# OpenSim document version 40000
Model STS_LaiArnold2017:
  gravity: 0 -9.80665 0
  length_units: meters
  force_units: N
  credits:
    Rajagopal Model w/ torso, arms, updated knee, modified for movements involving high hip and knee flexion
  publications:
    Lai,A.K.M., Arnold, A.S., Wakeling, J.M. (2017) Why are antagonist muscles co-activated in my simulation? A musculoskeletal model for analysing human locomotor tasks. Annals of Biomedical Engineering
  Ground:
    PhysicalOffsetFrame StoolFrame: socket_parent=.. translation=(-0.35 0 0) [meters]
        orientation=(-1.570796 0 0) [radians] meshes=stool_small.stl
    PhysicalOffsetFrame chairContactFrame: socket_parent=.. translation=(0 0.5 0)
  BodySet:
    Body pelvis: mass=5.8885 [kg] mass_center=(-0.0707 0 0) inertia=(0.0514 0.04355 0.02895 0 0 0)
        meshes=(r_pelvis.vtp l_pelvis.vtp)
      PhysicalOffsetFrame pelvis_cnctFrame: socket_parent=.. translation=(-0.075 -0.125 0) orientation=(0 0 -0.3490659)
      WrapCylinder Gmax2_at_pelvis_r: xyz_body_rotation=(-0.75 0.39 0) translation=(-0.08 -0.083 0.068) quadrant=all
          radius=0.04 length=0.1
      WrapCylinder PS_at_brim_r: xyz_body_rotation=(-0.25 -0.27 0.1) translation=(-0.074 -0.06 0.0656) quadrant=-y
          radius=0.05 length=0.1
    Body sacrum: mass=0 mass_center=(0 0 0) inertia=(0 0 0 0 0 0) meshes=sacrum.vtp
    Body femur_r: mass=9.3014 mass_center=(0 -0.17 0) inertia=(0.1339 0.0351 0.1412 0 0 0) meshes=r_femur.vtp
      WrapCylinder GasMed_at_condyles_r: translation=(0.005 -0.41 0) quadrant=all radius=0.025 length=0.1
      WrapCylinder KnExt_at_fem_r: xyz_body_rotation=(-0.0623366 0.0507601 0)
          translation=(0.00358828 -0.402732 0.00209111) quadrant=all radius=0.025 length=0.1
    Body tibia_r: mass=3.7075 mass_center=(0 -0.1867 0) inertia=(0.0504 0.0051 0.0511 0 0 0)
        meshes=(r_tibia.vtp r_fibula.vtp)
      WrapCylinder GasMed_at_shank_r: xyz_body_rotation=(2.96723 0.0279725 -1.47812)
          translation=(-0.0074 -0.074 -0.0033) quadrant=-y radius=0.059 length=0.1
      WrapCylinder SM_at_condyles_r: xyz_body_rotation=(0 -0.1 0) translation=(-0.001 -0.02 0) quadrant=all
          radius=0.0345 length=0.1
    Body patella_r: mass=0.0862 mass_center=(0.0018 0.0264 0) inertia=(2.87e-6 1.311e-5 1.311e-5 0 0 0)
        meshes=r_patella.vtp
    Body talus_r: mass=0.1 mass_center=(0 0 0) inertia=(0.001 0.001 0.001 0 0 0) meshes=r_talus.vtp
    Body calcn_r: mass=1.25 mass_center=(0.1 0.03 0) inertia=(0.0014 0.0039 0.0041 0 0 0) meshes=r_foot.vtp
      PhysicalOffsetFrame heel_cnctFrame: socket_parent=.. translation=(0 0 0)
    Body toes_r: mass=0.2166 mass_center=(0.0346 0.006 -0.0175) inertia=(0.0001 0.0002 0.001 0 0 0) meshes=r_bofoot.vtp
      PhysicalOffsetFrame toes_cnctFrame: socket_parent=.. translation=(0.03 0 0)
    Body lumbar5: mass=0.912 mass_center=(0.01728 0.0183 0) inertia=(0.089108 0.0108637 0.085743 0 0 0)
        meshes=lumbar5.vtp
    Body lumbar4: mass=0.8995 mass_center=(0.0186 0.0217953 0) inertia=(0.085604 0.0103396 0.082589 0 0 0)
        meshes=lumbar4.vtp
    Body lumbar3: mass=0.835 mass_center=(0.0178939 0.0232739 0) inertia=(0.0788485 0.00995535 0.0762235 0 0 0)
        meshes=lumbar3.vtp
    Body lumbar2: mass=0.8445 mass_center=(0.0252462 0.0202124 0) inertia=(0.0813525 0.01098755 0.0788525 0 0 0)
        meshes=lumbar2.vtp
    Body lumbar1: mass=0.8385 mass_center=(0.03274 0.0194073 0) inertia=(0.0813285 0.0120656 0.0789635 0 0 0)
        meshes=lumbar1.vtp
    Body torso: mass=12.7888 mass_center=(-0.03 0.32 0) inertia=(0.596195 0.256673 0.5816 0 0 0)
        meshes=(cerv1sm.vtp cerv2sm.vtp cerv3sm.vtp cerv4sm.vtp cerv5sm.vtp cerv6sm.vtp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)
  JointSet:
    WeldJoint ground_calcn_r: socket_parent_frame=ground_offset socket_child_frame=calcn_r_offset
      PhysicalOffsetFrame ground_offset: socket_parent=/ground translation=(0 0 0)
      PhysicalOffsetFrame calcn_r_offset: socket_parent=/bodyset/calcn_r translation=(0 0 0)
    PinJoint ankle: socket_parent_frame=tibia_r_offset socket_child_frame=talus_r_offset
      Coordinate ankle_angle: default_value=0.01024009 range=(-0.6981317 0.5235988) clamped=true
      PhysicalOffsetFrame tibia_r_offset: socket_parent=/bodyset/tibia_r translation=(-0.01 -0.4 0)
      PhysicalOffsetFrame talus_r_offset: socket_parent=/bodyset/talus_r translation=(0 0 0)
    WeldJoint subtalar: socket_parent_frame=talus_r_offset socket_child_frame=calcn_r_offset
      PhysicalOffsetFrame talus_r_offset: socket_parent=/bodyset/talus_r translation=(-0.04877 -0.04195 0.00792)
      PhysicalOffsetFrame calcn_r_offset: socket_parent=/bodyset/calcn_r translation=(0 0 0)
    WeldJoint mtp: socket_parent_frame=calcn_r_offset socket_child_frame=toes_r_offset
      PhysicalOffsetFrame calcn_r_offset: socket_parent=/bodyset/calcn_r translation=(0.1788 -0.002 0.00108)
      PhysicalOffsetFrame toes_r_offset: socket_parent=/bodyset/toes_r translation=(0 0 0)
    CustomJoint walker_knee: socket_parent_frame=femur_r_offset socket_child_frame=tibia_r_offset
      Coordinate knee_angle: default_value=1.289269 range=(0 2.443461) clamped=true
      PhysicalOffsetFrame femur_r_offset: socket_parent=/bodyset/femur_r translation=(-0.0045 -0.4096 -0.00175)
          orientation=(-1.5708 1.44618 1.5708)
      PhysicalOffsetFrame tibia_r_offset: socket_parent=/bodyset/tibia_r
          translation=(-0.00808954 -0.0035348 -0.00148474) orientation=(-1.5708 1.44618 1.5708)
      SpatialTransform: axes_held_at_zero=(rotation2 rotation3 translation1)
        TransformAxis rotation1: coordinates=knee_angle axis=(1 0 0) LinearFunction(coefficients=1 0)
        TransformAxis translation2: coordinates=knee_angle axis=(0 1 0)
          SimmSpline: x=(0 0.174533 0.349066 0.523599 0.698132 0.872665 1.0472 1.22173 1.39626 1.5708 1.74533 1.91986 2.0944)
              y=(0 0.000301 0.000143 -0.000401 -0.001233 -0.002243 -0.003316 -0.004346 -0.005239 -0.005924 -0.006361 -0.006539 -0.00648)
        TransformAxis translation3: coordinates=knee_angle axis=(0 0 1)
          SimmSpline: x=(0 0.174533 0.349066 0.523599 0.698132 0.872665 1.0472 1.22173 1.39626 1.5708 1.74533 1.91986 2.0944)
              y=(0 0.001055 0.002061 0.00289 0.003447 0.003676 0.003559 0.00311 0.002373 0.001418 0.000329 -0.000805 -0.001898)
    CustomJoint patellofemoral: socket_parent_frame=femur_r_offset socket_child_frame=patella_r_offset
      Coordinate knee_angle_beta: default_value=1.289269 range=(-99999.9 99999.9) clamped=false
      PhysicalOffsetFrame femur_r_offset: socket_parent=/bodyset/femur_r translation=(-0.00809 -0.40796 -0.00275)
      PhysicalOffsetFrame patella_r_offset: socket_parent=/bodyset/patella_r translation=(0 0 0)
      SpatialTransform: axes_held_at_zero=(rotation2 rotation3)
        TransformAxis rotation1: coordinates=knee_angle_beta axis=(0 0 1)
          SimmSpline: x=(0 0.174533 0.349066 0.523599 0.698132 0.872665 1.0472 1.22173 1.39626 1.5708 1.74533 1.91986 2.0944)
              y=(0.00113686 -0.00629212 -0.105582 -0.253683 -0.414245 -0.579047 -0.747244 -0.91799 -1.09044 -1.26379 -1.43763 -1.61186 -1.78634)
        TransformAxis translation1: coordinates=knee_angle_beta axis=(1 0 0)
          SimmSpline: x=(0 0.174533 0.349066 0.523599 0.698132 0.872665 1.0472 1.22173 1.39626 1.5708 1.74533 1.91986 2.0944)
              y=(0.0524 0.0488 0.0437 0.0371 0.0296 0.0216 0.0136 0.0057 -0.0019 -0.0088 -0.0148 -0.0196 -0.0227)
        TransformAxis translation2: coordinates=knee_angle_beta axis=(0 1 0)
          SimmSpline: x=(0 0.174533 0.349066 0.523599 0.698132 0.872665 1.0472 1.22173 1.39626 1.5708 1.74533 1.91986 2.0944)
              y=(-0.0108 -0.019 -0.0263 -0.0322 -0.0367 -0.0395 -0.0408 -0.0404 -0.0384 -0.0349 -0.0301 -0.0245 -0.0187)
        TransformAxis translation3: axis=(0 0 1) Constant(value=0.00275)
    PinJoint hip: socket_parent_frame=pelvis_offset socket_child_frame=femur_r_offset
      Coordinate hip_flexion: default_value=0.9452703 range=(-0.5235988 2.094395) clamped=true
      PhysicalOffsetFrame pelvis_offset: socket_parent=/bodyset/pelvis translation=(-0.056276 -0.07849 0.07726)
      PhysicalOffsetFrame femur_r_offset: socket_parent=/bodyset/femur_r translation=(0 0 0)
    WeldJoint sacrumjnt: socket_parent_frame=pelvis_offset socket_child_frame=sacrum_offset
      PhysicalOffsetFrame pelvis_offset: socket_parent=/bodyset/pelvis translation=(0.01 -0.017 0)
      PhysicalOffsetFrame sacrum_offset: socket_parent=/bodyset/sacrum translation=(0 0 0)
    PinJoint L5_S1_IVDjnt: socket_parent_frame=sacrum_offset socket_child_frame=lumbar5_offset
      Coordinate flex_extension: default_value=-0.3054326 range=(-0.785398 0.261799) clamped=true
      PhysicalOffsetFrame sacrum_offset: socket_parent=/bodyset/sacrum translation=(-0.098 0.071 0)
      PhysicalOffsetFrame lumbar5_offset: socket_parent=/bodyset/lumbar5 translation=(0 0 0)
    PinJoint L4_L5_IVDjnt: socket_parent_frame=lumbar5_offset socket_child_frame=lumbar4_offset
      Coordinate L4_L5_IVDjnt_r3: default_value=-0.0439823 range=(-99999.9 99999.9) clamped=false
      PhysicalOffsetFrame lumbar5_offset: socket_parent=/bodyset/lumbar5 translation=(0.01 0.0296 0)
      PhysicalOffsetFrame lumbar4_offset: socket_parent=/bodyset/lumbar4 translation=(0.001 -0.0025 0)
    PinJoint L3_L4_IVDjnt: socket_parent_frame=lumbar4_offset socket_child_frame=lumbar3_offset
      Coordinate L3_L4_IVDjnt_r3: default_value=-0.0625358 range=(-99999.9 99999.9) clamped=false
      PhysicalOffsetFrame lumbar4_offset: socket_parent=/bodyset/lumbar4 translation=(0 0.032 0)
      PhysicalOffsetFrame lumbar3_offset: socket_parent=/bodyset/lumbar3 translation=(-0.0006 -0.0012 0)
    PinJoint L2_L3_IVD_jnt: socket_parent_frame=lumbar3_offset socket_child_frame=lumbar2_offset
      Coordinate L2_L3_IVDjnt_r3: default_value=-0.07532518 range=(-99999.9 99999.9) clamped=false
      PhysicalOffsetFrame lumbar3_offset: socket_parent=/bodyset/lumbar3 translation=(-0.008 0.0312 0)
      PhysicalOffsetFrame lumbar2_offset: socket_parent=/bodyset/lumbar2 translation=(-0.0013 -0.0039 0)
    PinJoint L1_L2_IVD_jnt: socket_parent_frame=lumbar2_offset socket_child_frame=lumbar1_offset
      Coordinate L1_L2_IVDjnt_r3: default_value=-0.08985278 range=(-99999.9 99999.9) clamped=false
      PhysicalOffsetFrame lumbar2_offset: socket_parent=/bodyset/lumbar2 translation=(-0.01 0.025 0)
      PhysicalOffsetFrame lumbar1_offset: socket_parent=/bodyset/lumbar1 translation=(0.0014 -0.0038 0)
    WeldJoint Torsojnt: socket_parent_frame=lumbar1_offset socket_child_frame=torso_offset
      PhysicalOffsetFrame lumbar1_offset: socket_parent=/bodyset/lumbar1 translation=(0.0025 -0.09 0)
      PhysicalOffsetFrame torso_offset: socket_parent=/bodyset/torso translation=(0 0 0)
  ConstraintSet:
    CoordinateCouplerConstraint [values shared by the 5 below unless stated]: scale_factor=1
        independent_coordinate_names=flex_extension
    CoordinateCouplerConstraint patellofemoral_knee_angle_con: independent_coordinate_names=knee_angle
        dependent_coordinate_name=knee_angle_beta coupled_coordinates_function=LinearFunction(coefficients=1 0)
    CoordinateCouplerConstraint L4_L5_IVDjnt_r3_con: dependent_coordinate_name=L4_L5_IVDjnt_r3
        coupled_coordinates_function=LinearFunction(coefficients=0.144 0)
    CoordinateCouplerConstraint L3_L4_IVDjnt_r3_con: dependent_coordinate_name=L3_L4_IVDjnt_r3
        coupled_coordinates_function=LinearFunction(coefficients=0.204745 0)
    CoordinateCouplerConstraint L2_L3_IVDjnt_r3_con: dependent_coordinate_name=L2_L3_IVDjnt_r3
        coupled_coordinates_function=LinearFunction(coefficients=0.246618 0)
    CoordinateCouplerConstraint L1_L2_IVDjnt_r3_con: dependent_coordinate_name=L1_L2_IVDjnt_r3
        coupled_coordinates_function=LinearFunction(coefficients=0.294182 0)
  ForceSet:
    Millard2012EquilibriumMuscle [values shared by the 10 below unless stated]: default_activation=0.01
        minimum_activation=0.01
      ActiveForceLengthCurve: min_norm_active_fiber_length=0.25 transition_norm_fiber_length=0.77
          max_norm_active_fiber_length=1.9 shallow_ascending_slope=0.75 minimum_value=0
      ForceVelocityCurve: concentric_slope_at_vmax=0 concentric_slope_near_vmax=0.25 isometric_slope=5
          eccentric_slope_at_vmax=0 eccentric_slope_near_vmax=0.15 max_eccentric_velocity_force_multiplier=1.4
      FiberForceLengthCurve: strain_at_zero_force=0 strain_at_one_norm_force=0.7
      TendonForceLengthCurve
    Millard2012EquilibriumMuscle gastroc: max_isometric_force=4690.574 optimal_fiber_length=0.059
        tendon_slack_length=0.387 pennation_angle_at_optimal=0.1656816 [radians] fiber_damping=0.01
      PathPoint gasmed_r-P1: femur_r (0.006 -0.385 -0.022)
      PathPoint gasmed_r-P2: calcn_r (0.0044 0.031 -0.0053)
      PathWrap: wrap_object=GasMed_at_shank_r method=hybrid
      PathWrap pathwrap_0: wrap_object=GasMed_at_condyles_r method=hybrid
    Millard2012EquilibriumMuscle glut_max: max_isometric_force=3337.584 optimal_fiber_length=0.157
        tendon_slack_length=0.109 pennation_angle_at_optimal=0.3673821 ignore_tendon_compliance=true fiber_damping=0.01
      PathPoint glmax2_r-P1: pelvis (-0.1317 0.0087 0.0462)
      PathPoint glmax2_r-P2: pelvis (-0.1344 -0.0609 0.0813)
      PathPoint glmax2_r-P3: femur_r (-0.045 -0.0584 0.0252)
      PathPoint glmax2_r-P4: femur_r (-0.0156 -0.1016 0.0419)
      PathWrap: wrap_object=Gmax2_at_pelvis_r method=hybrid
    Millard2012EquilibriumMuscle iliopsoas: max_isometric_force=2697.344 optimal_fiber_length=0.1169
        tendon_slack_length=0.09954317 pennation_angle_at_optimal=0.2155251 ignore_tendon_compliance=true
        fiber_damping=0.01
      PathPoint psoas_r-P1: pelvis (-0.0606 0.062 0.039)
      PathPoint psoas_r-P2: pelvis (-0.0205 -0.0654 0.0656)
      PathPoint psoas_r-P3: femur_r (-0.0132 -0.0467 0.0046)
      PathPoint psoas_r-P4: femur_r (-0.0235 -0.0524 0.0088)
      PathWrap: wrap_object=PS_at_brim_r method=hybrid range=(2 3)
    Millard2012EquilibriumMuscle recfem: max_isometric_force=2191.741 optimal_fiber_length=0.0759
        tendon_slack_length=0.4504 pennation_angle_at_optimal=0.2170149 fiber_damping=0.01
      PathPoint recfem_r-P1: pelvis (-0.024 -0.0388 0.0933)
      PathPoint recfem_r-P2: patella_r (0.01 0.049 0.0007)
      PathPoint recfem_r-P3: patella_r (0.0121 0.0437 -0.001)
      PathPoint recfem_r-P4: patella_r (0.005 0.00247 3e-5)
      PathPoint recfem_r-P5: tibia_r (0.0326 -0.06312 -0.00047)
      PathWrap: wrap_object=KnExt_at_fem_r method=hybrid
    Millard2012EquilibriumMuscle hamstrings: max_isometric_force=4105.466 optimal_fiber_length=0.086
        tendon_slack_length=0.335 pennation_angle_at_optimal=0.2545615 fiber_damping=0.01
      PathPoint semimem_r-P1: pelvis (-0.0987 -0.114 0.0614)
      PathPoint semimem_r-P2: tibia_r (-0.027 -0.041 -0.0196)
      PathWrap: wrap_object=SM_at_condyles_r method=hybrid
    Millard2012EquilibriumMuscle soleus: max_isometric_force=7924.997 optimal_fiber_length=0.044
        tendon_slack_length=0.28135 pennation_angle_at_optimal=0.3814289 fiber_damping=0.01
      PathPoint soleus_r-P1: tibia_r (-0.0076 -0.0916 0.0098)
      PathPoint soleus_r-P2: calcn_r (0.0044 0.031 -0.0053)
    Millard2012EquilibriumMuscle tibant: max_isometric_force=2116.818 optimal_fiber_length=0.0683
        tendon_slack_length=0.240461 pennation_angle_at_optimal=0.1951828 fiber_damping=0.01
      PathPoint tibant_r-P1: tibia_r (0.0154 -0.1312 0.0162)
      PathPoint tibant_r-P2: tibia_r (0.0251 -0.1906 0.0128)
      PathPoint tibant_r-P3: tibia_r (0.0233 -0.3659 -0.0132)
      PathPoint tibant_r-P4: calcn_r (0.1166 0.0178 -0.0305)
    Millard2012EquilibriumMuscle vasti: max_isometric_force=9593.951 optimal_fiber_length=0.117
        tendon_slack_length=0.205 pennation_angle_at_optimal=0.06309973 fiber_damping=0.01
      PathPoint vasint_r-P1: femur_r (0.029 -0.1924 0.031)
      PathPoint vasint_r-P2: femur_r (0.0335 -0.2084 0.0285)
      PathPoint vasint_r-P3: patella_r (0.0058 0.048 -0.0006)
      PathPoint vasint_r-P4: patella_r (0.005 0.00247 -0.00039)
      PathPoint vasint_r-P5: tibia_r (0.03257 -0.0632 0.00043)
      PathWrap: wrap_object=KnExt_at_fem_r method=hybrid
    Millard2012EquilibriumMuscle rect_abd_r: max_isometric_force=348.76 optimal_fiber_length=0.2238
        tendon_slack_length=0.017 pennation_angle_at_optimal=0 ignore_tendon_compliance=true
        activation_time_constant=0.01 [seconds] deactivation_time_constant=0.04 [seconds]
      PathPoint P1: pelvis (-0.026 -0.07 0.011)
      PathPoint P2: torso (0.092 0.221982 0.031)
      ActiveForceLengthCurve: minimum_value=0
      FiberForceLengthCurve
    Millard2012EquilibriumMuscle ercspn_r: max_isometric_force=2500 optimal_fiber_length=0.12614
        tendon_slack_length=0.19968 pennation_angle_at_optimal=0.2199115
      PathPoint LTpT_t8_R-P1: sacrum (-0.142901 0.0502456 0.00037451)
      PathPoint LTpT_t8_R-P2: lumbar4 (-0.0469739 0.0180443 0.00565735)
      PathPoint LTpT_t8_R-P3: lumbar3 (-0.0467498 0.0135459 0.00831636)
      PathPoint LTpT_t8_R-P2_0: lumbar2 (-0.0453159 0.00310151 0.01094)
      PathPoint LTpT_t8_R-P2_1: torso (-0.079 0.241 0.0255)
      ActiveForceLengthCurve: minimum_value=0
      FiberForceLengthCurve
    CoordinateLimitForce ankle_angle_LimitForce: coordinate=ankle_angle upper_stiffness=20 [N*m/degree]
        upper_limit=30 [degrees] lower_stiffness=20 [N*m/degree] lower_limit=-40 [degrees] damping=1
        transition=10 [degrees] compute_dissipation_energy=false
    CoordinateLimitForce knee_angle_LimitForce: coordinate=knee_angle upper_stiffness=20 upper_limit=140
        lower_stiffness=20 lower_limit=0 damping=1 transition=10 compute_dissipation_energy=false
    CoordinateLimitForce hip_flexion_LimitForce: coordinate=hip_flexion upper_stiffness=20 upper_limit=120
        lower_stiffness=20 lower_limit=-30 damping=1 transition=10 compute_dissipation_energy=false
    CoordinateLimitForce flex_extension_LimitForce: coordinate=flex_extension upper_stiffness=20 upper_limit=14.99998
        lower_stiffness=20 lower_limit=-44.99999 damping=1 transition=10 compute_dissipation_energy=false
    ElasticFoundationForce chairForce: transition_velocity=0.1
      ContactParametersSet contact_parameters:
        ContactParameters: geometry=(pelvis_cnctEllipse chair) stiffness=2000000 dissipation=2 static_friction=0.8
            dynamic_friction=0.8 viscous_friction=0.5
    ObjectGroup hip_flex: members=(iliopsoas recfem)
    ObjectGroup hip_ext: members=(glut_max hamstrings)
    ObjectGroup knee_flex: members=hamstrings
    ObjectGroup knee_ext: members=(recfem vasti)
    ObjectGroup ankle_df: members=tibant
    ObjectGroup ankle_pf: members=soleus
  ContactGeometrySet:
    ContactHalfSpace chair: socket_frame=/ground/chairContactFrame location=(0 0 0) orientation=(0 0 -1.570796)
    ContactMesh pelvis_cnctEllipse: socket_frame=/bodyset/pelvis/pelvis_cnctFrame location=(0 0 0)
        orientation=(0 1.570796 0) filename=blockMesh.obj
